*Heading
**	Copyright (c) 2015 James A. Grogan
**
**       Permission is hereby granted, free of charge, to any person obtaining a copy
**       of this software and associated documentation files (the "Software"), to deal
**       in the Software without restriction, including without limitation the rights
**      to use, copy, modify, merge, publish, distribute, sublicense, and/or sell
**       copies of the Software, and to permit persons to whom the Software is
**       furnished to do so, subject to the following conditions:
**
**       The above copyright notice and this permission notice shall be included in
**       call copies or substantial portions of the Software.
**
**       THE SOFTWARE IS PROVIDED "AS IS", WITHOUT WARRANTY OF ANY KIND, EXPRESS OR
**       IMPLIED, INCLUDING BUT NOT LIMITED TO THE WARRANTIES OF MERCHANTABILITY,
**       FITNESS FOR A PARTICULAR PURPOSE AND NONINFRINGEMENT. IN NO EVENT SHALL THE
**       AUTHORS OR COPYRIGHT HOLDERS BE LIABLE FOR ANY CLAIM, DAMAGES OR OTHER
**      LIABILITY, WHETHER IN AN ACTION OF CONTRACT, TORT OR OTHERWISE, ARISING FROM,
**       OUT OF OR IN CONNECTION WITH THE SOFTWARE OR THE USE OR OTHER DEALINGS IN
**       THE SOFTWARE.
**
**       Author: J. Grogan
**       Initial Version: 2012
**	-------------------------------------------------------------------
** Job name: S6 Model name: Square6
** Generated by: Abaqus/CAE 6.10-1
*Preprint, echo=NO, model=NO, history=NO, contact=NO
**
** PARTS
**
*Part, name=Geom
*Node
      1,  0.606349528, -0.589048624,  0.119999997
      2,  0.606349528, -0.589048624, 0.0599999987
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*Element, type=C3D8R
  1,  109,  643, 1685,  503,    1,   29,  363,   65
  2,  643,  644, 1686, 1685,   29,   30,  364,  363
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*Nset, nset=BC3
 14,
*Nset, nset=BCB
   1,   2,   3,   6,   7,  10
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*Elset, elset=BCB
   1,   2,   3,   4,   5,   6
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*Nset, nset=BCT
   20,   21,   22,   23,   24,   25
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*Elset, elset=BCT, generate
 1801,  1836,     1
*Nset, nset=Const
    1,    2,    3,    4,    5,    6
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*Elset, elset=Const
    1,    2,    3,    4,    5,    6
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*Nset, nset=Fixed
    1,    2,    3,    6,    7,   10
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*Elset, elset=Fixed
    1,    2,    3,    4,    5,    6
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*Nset, nset=_PickedSet67, internal, generate
    1,  3234,     1
*Elset, elset=_PickedSet67, internal, generate
    1,  2340,     1
*Nset, nset=All, generate
    1,  3234,     1
*Elset, elset=All, generate
    1,  2340,     1
*Nset, nset=BC4
 22,
** Section: Magnesium
*Solid Section, elset=_PickedSet67, controls=EC-1, material=Magnesium
,
*End Part
**
**
** ASSEMBLY
**
*Assembly, name=Assembly
**
*Instance, name=Geom-1, part=Geom
*End Instance
**
*Nset, nset=Set-1, instance=Geom-1, generate
    1,  3234,     1
*Elset, elset=Set-1, instance=Geom-1, generate
    1,  2340,     1
*End Assembly
**
** ELEMENT CONTROLS
**
*Section Controls, name=EC-1, hourglass=ENHANCED
1., 1., 1.
**
** MATERIALS
**
*Material, name=Magnesium
*Elastic
44000., 0.3
*Plastic
138.,   0.
290., 0.16
**
** BOUNDARY CONDITIONS
**
** Name: BC-1 Type: Displacement/Rotation
*Boundary
Geom-1.BCB, 2, 2
** Name: BC-2 Type: Displacement/Rotation
*Boundary
Geom-1.BC3, 1, 1
Geom-1.BC3, 3, 3
** Name: BC-5 Type: Displacement/Rotation
*Boundary
Geom-1.BC4, 3, 3
** ----------------------------------------------------------------
**
** STEP: Step-1
**
*Step, name=Step-1, nlgeom=YES
*Static
0.1, 1., 1e-05, 1.
**
** BOUNDARY CONDITIONS
**
** Name: BC-3 Type: Displacement/Rotation
*Boundary
Geom-1.BCT, 2, 2, 0.3937
**
** OUTPUT REQUESTS
**
*Restart, write, frequency=0
**
** FIELD OUTPUT: F-Output-1
**
*Output, field
*Node Output
CF, RF, U
*Element Output, directions=YES
LE, PE, PEEQ, PEMAG, S
*Contact Output
CDISP, CFORCE, CSTRESS
**
** HISTORY OUTPUT: H-Output-1
**
*Output, history, variable=PRESELECT
*End Step
** ----------------------------------------------------------------
**
** STEP: Step-2
**
*Step, name=Step-2, nlgeom=YES
*Static
0.1, 1., 1e-05, 1.
**
** BOUNDARY CONDITIONS
**
** Name: BC-1 Type: Displacement/Rotation
*Boundary, op=NEW
Geom-1.BCB, 2, 2
** Name: BC-2 Type: Displacement/Rotation
*Boundary, op=NEW
Geom-1.BC3, 1, 1
Geom-1.BC3, 3, 3
** Name: BC-3 Type: Displacement/Rotation
*Boundary, op=NEW
** Name: BC-5 Type: Displacement/Rotation
*Boundary, op=NEW
Geom-1.BC4, 3, 3
**
** OUTPUT REQUESTS
**
*Restart, write, number interval=1, time marks=NO
**
** FIELD OUTPUT: F-Output-1
**
*Output, field
*Node Output
CF, RF, U
*Element Output, directions=YES
LE, PE, PEEQ, PEMAG, S
*Contact Output
CDISP, CFORCE, CSTRESS
**
** HISTORY OUTPUT: H-Output-1
**
*Output, history, variable=PRESELECT
*End Step
** ----------------------------------------------------------------
**
** STEP: Step-3
**
*Step, name=Step-3, nlgeom=YES
*Static
0.05, 1., 1e-05, 0.05
*Adaptive Mesh, elset=Geom-1.All, frequency=1, mesh sweeps=10, op=NEW
**
** ADAPTIVE MESH CONSTRAINTS
**
** Name: Ada-Cons-1 Type: Velocity/Angular velocity
*Adaptive Mesh Constraint, user, type=VELOCITY
Geom-1.Const
**
** OUTPUT REQUESTS
**
*Restart, write, frequency=0
**
*field,user
Set-1
** FIELD OUTPUT: F-Output-1
**
*Output, field
*Node Output
CF, RF, U
*Element Output, directions=YES
LE, PE, PEEQ, PEMAG, S
*Contact Output
CDISP, CFORCE, CSTRESS
**
** HISTORY OUTPUT: H-Output-1
**
*Output, history, variable=PRESELECT
*End Step
** ----------------------------------------------------------------
**
** STEP: Step-4
**
*Step, name=Step-4, nlgeom=YES
*Static
0.05, 0.05, 5e-07, 0.05
*Adaptive Mesh, op=NEW
**
** ADAPTIVE MESH CONSTRAINTS
**
** Name: Ada-Cons-1 Type: Velocity/Angular velocity
*Adaptive Mesh Constraint, op=NEW
**
** OUTPUT REQUESTS
**
*Restart, write, frequency=0
**
** FIELD OUTPUT: F-Output-1
**
*Output, field
*Node Output
CF, RF, U
*Element Output, directions=YES
LE, PE, PEEQ, PEMAG, S
*Contact Output
CDISP, CFORCE, CSTRESS
**
** HISTORY OUTPUT: H-Output-1
**
*Output, history, variable=PRESELECT
*End Step
** ----------------------------------------------------------------
**
** STEP: Step-5
**
*Step, name=Step-5, nlgeom=YES
*Static
0.02, 1., 1e-05, 0.02
**
** BOUNDARY CONDITIONS
**
** Name: BC-4 Type: Displacement/Rotation
*Boundary
Geom-1.BCT, 2, 2
**
** OUTPUT REQUESTS
**
*Restart, write, frequency=0
**
** FIELD OUTPUT: F-Output-1
**
*Output, field
*Node Output
CF, RF, U
*Element Output, directions=YES
LE, PE, PEEQ, PEMAG, S
*Contact Output
CDISP, CFORCE, CSTRESS
**
** HISTORY OUTPUT: H-Output-1
**
*Output, history, variable=PRESELECT
*End Step
