*Heading
**	Copyright (c) 2015 James A. Grogan
**
**       Permission is hereby granted, free of charge, to any person obtaining a copy
**       of this software and associated documentation files (the "Software"), to deal
**       in the Software without restriction, including without limitation the rights
**      to use, copy, modify, merge, publish, distribute, sublicense, and/or sell
**       copies of the Software, and to permit persons to whom the Software is
**       furnished to do so, subject to the following conditions:
**
**       The above copyright notice and this permission notice shall be included in
**       call copies or substantial portions of the Software.
**
**       THE SOFTWARE IS PROVIDED "AS IS", WITHOUT WARRANTY OF ANY KIND, EXPRESS OR
**       IMPLIED, INCLUDING BUT NOT LIMITED TO THE WARRANTIES OF MERCHANTABILITY,
**       FITNESS FOR A PARTICULAR PURPOSE AND NONINFRINGEMENT. IN NO EVENT SHALL THE
**       AUTHORS OR COPYRIGHT HOLDERS BE LIABLE FOR ANY CLAIM, DAMAGES OR OTHER
**      LIABILITY, WHETHER IN AN ACTION OF CONTRACT, TORT OR OTHERWISE, ARISING FROM,
**       OUT OF OR IN CONNECTION WITH THE SOFTWARE OR THE USE OR OTHER DEALINGS IN
**       THE SOFTWARE.
**
**       Author: J. Grogan
**       Initial Version: 2012
**	-------------------------------------------------------------------
** Job name: TRIAL2 Model name: Trial2
** Generated by: Abaqus/CAE 6.10-1
*Preprint, echo=NO, model=NO, history=NO, contact=NO
**
** PARTS
**
*Part, name=Mesh8
*Node
      1,   1.35000002,          1.5,           0.
      2,   1.35000002,   1.29903722,   0.75000155
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*Element, type=C3D8RT
    1,    90,    91,  1351,  1343,  1673,  1672,  9607,  9599
    2,    91,    92,  1350,  1351,  1672,  1671,  9606,  9607
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*Elset, elset=Set-1, generate
 18039,  19010,      1
*Elset, elset=InterfaceE
 18039, 18040, 18041, 18042, 18043, 18044
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*Nset, nset=InterfaceN
   61,   62,   63,   64,   65,   66
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*Elset, elset=_PickedSet5, internal, generate
 18039,  19010,      1
*Elset, elset=_PickedSet6, internal
     1,     2,     3,     4,     5,     6
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** Section: Section-1
*Solid Section, elset=_PickedSet6, controls=EC-1, material=Material-1
,
** Section: Section-2
*Solid Section, elset=_PickedSet5, controls=EC-1, material=Material-2
,
*End Part
**
**
** ASSEMBLY
**
*Assembly, name=Assembly
**
*Instance, name=Mesh8-1, part=Mesh8
*End Instance
**
*Nset, nset=All, instance=Mesh8-1, generate
     1,  34496,      1
*Nset, nset=_PickedSet57, internal, instance=Mesh8-1
    61,    62,    63,    64,    65,    66
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*Nset, nset=_PickedSet58, internal, instance=Mesh8-1
    61,    62,    63,    64,    65,    66
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*Elset, elset=_PickedSet59, internal, instance=Mesh8-1, generate
     1,  31433,      1
*End Assembly
**
** ELEMENT CONTROLS
**
*Section Controls, name=EC-1, hourglass=ENHANCED
1., 1., 1.
**
** MATERIALS
**
*Material, name=Material-1
*Conductivity
 0.10575,
*Density
1.,
*Elastic
 0.001, 0.3
*Specific Heat
1.,
*Material, name=Material-2
*Conductivity
 0.10575,
*Density
1.,
*Elastic
44000., 0.3
*Specific Heat
1.,
**
** PREDEFINED FIELDS
**
** Name: Predefined Field-1   Type: Temperature
*Initial Conditions, type=TEMPERATURE
_PickedSet58, 134.
** ----------------------------------------------------------------
**
** STEP: Step-1
**
*Step, name=Step-1, nlgeom=YES, inc=10000
*Coupled Temperature-displacement, creep=none, deltmx=100.
0.000125, 0.3, 1e-06, 0.000125
**
** BOUNDARY CONDITIONS
**
** Name: BC-1 Type: Temperature
*Boundary
_PickedSet57, 11, 11, 134.
*Adaptive Mesh, elset=_PickedSet59, frequency=1, mesh sweeps=5, op=NEW
**
*field,user
All
** ADAPTIVE MESH CONSTRAINTS
**
** Name: Ada-Cons-1 Type: Velocity/Angular velocity
*Adaptive Mesh Constraint, user, type=VELOCITY
Mesh8-1.InterfaceN
**
** OUTPUT REQUESTS
**
*Restart, write, frequency=0
**
** FIELD OUTPUT: F-Output-1
**
*Output, field
*Node Output
CF, COORD, NT, RF, RFL, U
*Element Output, directions=YES
EVOL, HFL, LE, PE, PEEQ, PEMAG, S
*Contact Output
CDISP, CSTRESS
**
** HISTORY OUTPUT: H-Output-1
**
*Output, history, variable=PRESELECT
*End Step
